!!! Base displacement 2
!!! +-+-+-

/solu
antype,0
prefix='BaseDisp2'

time,1
nlgeom,on
sstif,on

!!! ------------------Add loads------------------------
esel,all
acel,,9.8,,

/input, '2_base_displacement', 'mac', 'C:\Users\xuhui\Desktop\JiashaoBridge\model\LoadFiles'

allsel,all
solve

!!! ------------------Export results-------------------
/input, 'output_images', 'mac', 'C:\Users\xuhui\Desktop\JiashaoBridge\model'
