!!! Traffic load

/solu
antype,0
prefix='Traffic'

time,1
nlgeom,on
sstif,on

!!! ------------------Add loads------------------------
esel,all
acel,,9.8,,

/input, '5_traffic_load', 'mac', 'C:\Users\xuchi\Desktop\JiashaoBridge\model\LoadFiles'

allsel,all
solve

!!! ------------------Export results-------------------
/input, 'output_images', 'mac', 'C:\Users\xuchi\Desktop\JiashaoBridge\model'
